mN := N*10^-3
MN = 1000000 N
m_i(i) := {
    if i == 1
        30
    else if i == 2
        (30 + 60)/2 + 2000/0.02
    else if i == 3
        60
    else if i == 4
        40
    else if i == 5
        30
    else if i == 6
        3500
    else if i == 7
        50
    else if i == 8
        35
    else if i == 9
        2500
    else if i == 10
        (2500 + 50)/2 + 2000/0.02
    else if i == 11
        50
}*kg/m
EJ_i(i) := {
    if i == 1
        40
    else if i == 2
        (40 + 90)/2
    else if i == 3
        90
    else if i == 4
        60
    else if i == 5
        44
    else if i == 6
        44
    else if i == 7
        60
    else if i == 8
        55
    else if i == 9
        55
    else if i == 10
        (55 + 60)/2 + 3000
    else if i == 11
        60
}*MN*m^2
x(i) := {
    if i == 1
        1.7 - 0.01
    else if i == 2
        1.7 + 0.01
    else if i == 3
        3.5
    else if i == 4
        4
    else if i == 5
        7
    else if i == 6
        10
    else if i == 7
        11
    else if i == 8
        15
    else if i == 9
        19 - 0.01
    else if i == 10
        19 + 0.01
    else if i == 11
        21
}*m
i(x) :=
    x ← x/m
    if x < 1.7 - 0.01
        1
    else if x < 1.7 + 0.01
        2
    else if x < 3.5
        3
    else if x < 4
        4
    else if x < 7
        5
    else if x < 10
        6
    else if x < 11
        7
    else if x < 15
        8
    else if x < 19 - 0.01
        9
    else if x < 19 + 0.01
        10
    else if x < 21
        11
l_i(i) :=
    if i == 1
        x(i)
    else
        x(i) - x(i - 1)
L := 21 m
b_i(ω, i) := nthroot(ω^2*m_i(i)/EJ_i(i), 4)
S(x, ω, i) := 1/2*(cosh(b_i(ω, i)*x) + cos(b_i(ω, i)*x))
T(x, ω, i) := 1/2*(sinh(b_i(ω, i)*x) + sin(b_i(ω, i)*x))
U(x, ω, i) := 1/2*(cosh(b_i(ω, i)*x) - cos(b_i(ω, i)*x))
V(x, ω, i) := 1/2*(sinh(b_i(ω, i)*x) - sin(b_i(ω, i)*x))
A_i(x, ω, i) := [
    S(x, ω, i), T(x, ω, i)/b_i(ω, i), U(x, ω, i)/(EJ_i(i)*b_i(ω, i)^2), V(x, ω, i)/(EJ_i(i)*b_i(ω, i)^3);
    V(x, ω, i)*b_i(ω, i), S(x, ω, i), T(x, ω, i)/(EJ_i(i)*b_i(ω, i)), U(x, ω, i)/(EJ_i(i)*b_i(ω, i)^2);
    U(x, ω, i)*EJ_i(i)*b_i(ω, i)^2, V(x, ω, i)*EJ_i(i)*b_i(ω, i), S(x, ω, i), T(x, ω, i)/b_i(ω, i);
    V(x, ω, i)*EJ_i(i)*b_i(ω, i)^3, U(x, ω, i)*EJ_i(i)*b_i(ω, i)^2, V(x, ω, i)*b_i(ω, i), S(x, ω, i)
]
A_i(ω, i) := A_i(l_i(i), ω, i)  # disabled
P_L(ω) := product(A_i(l_i(i), ω, i), i = 1 .. 11)
P_L(1/s) = [
    1.06518, 21.5511 m, 4.1265e-6 1/N, 3.00643e-5 s^2/kg;
    0.00958726 1/m, 1.10754, 4.10588e-7 1/J, 4.38651e-6 1/N;
    40539.3 N, 697013 J, 1.06622, 21.279 m;
    367.25 kg/s^2, 38563.5 N, 0.00488041 1/m, 1.02494
]
D(ω) := P_L(ω)[2, 0]*P_L(ω)[3, 1] - P_L(ω)[2, 1]*P_L(ω)[3, 0]
ω := 0 rad/s, 0.1*rad/s .. 50*rad/s
# [plot: D(ω) vs ω]
# pic2
solve block
    # guess values
    ω := 20*1/s
    # constraints
    D(ω) == 0
    # solver
    ω_1 := find(ω) = 18.5437 1/s
end solve block
solve block
    # guess values
    ω := 40*1/s
    # constraints
    D(ω) == 0
    # solver
    ω_2 := find(ω) = 44.3624 1/s
end solve block
# Построение собственных форм колебаний
γ_i(i) := sqrt(m_i(i)/m_i(i + 1)*EJ_i(i + 1)/EJ_i(i))
β_i(i) := EJ_i(i)/EJ_i(i + 1)
C_1(ω, i) :=
    if i == 1
        □  # error: Отсутствует элемент или выражение.
f(x, ω) := C_1(ω, i(x))*sin(b_i(ω, i(x))*x)  # error: Эта переменная не определена. Проверьте правильность установки обозначения.
product(i, i = 3 .. 1) = 6
P(ω, x) :=
    if i(x) > 1
        A_i(x - sum(l_i(j), j = 1 .. i(x) - 1), ω, i(x))*product(A_i(l_i(j), ω, j), j = i(x) - 1 .. 1)
    else
        A_i(x, ω, 1)
f(x, ω) := P(ω, x)[0, 0] - P_L(ω)[2, 0]/P_L(ω)[2, 1]*P(ω, x)[0, 1]
θ(x, ω) := P(ω, x)[1, 0] - P_L(ω)[2, 0]/P_L(ω)[2, 1]*P(ω, x)[1, 1]
x := 0, 0.1 m .. 21 m
# [plot: f(x, ω_1) vs x]
# pic3
# [plot: f(x, ω_2) vs x]
# pic4
# [plot: θ(x, ω_1) vs x]
# pic5
# [plot: θ(x, ω_2) vs x]
# pic6
u_0(ω) := [1; -P_L(ω)[2, 0]/P_L(ω)[2, 1]; 0*N; 0*kg/s^2]
u(x, ω) := P(ω, x)*u_0(ω)
u(x, ω_1) =  # error: Значение должно быть скаляром или матрицей.
ω_0 := 0.001 rad/s
# [plot: u(x, ω_0)[0] vs x]
# [plot: u(x, ω_0)[2] vs x]
# [plot: u(x, ω_0)[3] vs x]
